@Author Marius Duvillard;
@Date 12 janvier 2026;
@Description{
    "Uniaxial relaxation test"
    "mtest relax.mtest"};


//* The constitutive law
@Behaviour < generic > './src/libBehaviour.so' 'norton_hardening_nn';

@ExternalStateVariable 'Temperature' 300.0; // Temperature in Kelvin

@ImposedStrain 'EXY' {
    0.0 : 0.0,
    0.1 : 0.008,
    0.2 : 0.0,
    0.3 : 0.008,
    0.4 : 0.0

};

@Times{
    0.0,
    0.2 in 200,
    0.4 in 200};

@UserDefinedPostProcessing 'relax_nn.res' {'EXY', 'SXY', 'p'};
