@Author Marius Duvillard;
@Date 12 janvier 2026;
@Description{
"Uniaxial relaxation test"
"mtest relax.mtest"
};

// Loading
@Real 'tcharge' 0.0001;
//* The constitutive law
@Behaviour<generic> './src/libBehaviour.so' 'NeuralGSM' ;

//* Constant temperature
@ExternalStateVariable 'Temperature' 300.0; // Temperature in Kelvin
//* Mechanical Loading
@ImposedStrain 'EXY' {0. : 0., 'tcharge' : 0.02, 10.0 : 0.02};
// @ImposedStress 'SXX' {0. : 0., 'tcharge' : 0., 10.0 : 0.};
// @ImposedStress 'SYY' {0. : 0., 'tcharge' : 0., 10.0 : 0.};
//* Time discretization
@Times {0., 'tcharge' in 40, 10.0 in 100};
//@Test<file> 'vel1.ref' {'SZZ':10} 1e6;
@UserDefinedPostProcessing 'relax_nn.res' {'EXY','SXY'} ;
